! Phase A
New PVsystem.pv1A   bus1=1.1   Phases=1 kV=4.16 kVA=12 pmpp=10 irradiance=1 pf=1 %cutin=0.1 %cutout=0.1
New PVsystem.pv7A   bus1=7.1   Phases=1 kV=4.16 kVA=12 pmpp=10 irradiance=1 pf=1 %cutin=0.1 %cutout=0.1
New PVsystem.pv13A  bus1=13.1  Phases=1 kV=4.16 kVA=12 pmpp=10 irradiance=1 pf=1 %cutin=0.1 %cutout=0.1
New PVsystem.pv18A  bus1=18.1  Phases=1 kV=4.16 kVA=12 pmpp=10 irradiance=1 pf=1 %cutin=0.1 %cutout=0.1
New PVsystem.pv21A  bus1=21.1  Phases=1 kV=4.16 kVA=12 pmpp=10 irradiance=1 pf=1 %cutin=0.1 %cutout=0.1
New PVsystem.pv23A  bus1=23.1  Phases=1 kV=4.16 kVA=12 pmpp=10 irradiance=1 pf=1 %cutin=0.1 %cutout=0.1
New PVsystem.pv28A  bus1=28.1  Phases=1 kV=4.16 kVA=12 pmpp=10 irradiance=1 pf=1 %cutin=0.1 %cutout=0.1
New PVsystem.pv250A bus1=250.1 Phases=1 kV=4.16 kVA=12 pmpp=10 irradiance=1 pf=1 %cutin=0.1 %cutout=0.1
New PVsystem.pv54A  bus1=54.1  Phases=1 kV=4.16 kVA=12 pmpp=10 irradiance=1 pf=1 %cutin=0.1 %cutout=0.1
New PVsystem.pv57A  bus1=57.1  Phases=1 kV=4.16 kVA=12 pmpp=10 irradiance=1 pf=1 %cutin=0.1 %cutout=0.1
New PVsystem.pv60A  bus1=60.1  Phases=1 kV=4.16 kVA=12 pmpp=10 irradiance=1 pf=1 %cutin=0.1 %cutout=0.1
New PVsystem.pv610A bus1=610.1 Phases=1 kV=4.16 kVA=12 pmpp=10 irradiance=1 pf=1 %cutin=0.1 %cutout=0.1
New PVsystem.pv63A  bus1=63.1  Phases=1 kV=4.16 kVA=12 pmpp=10 irradiance=1 pf=1 %cutin=0.1 %cutout=0.1
New PVsystem.pv65A  bus1=65.1  Phases=1 kV=4.16 kVA=12 pmpp=10 irradiance=1 pf=1 %cutin=0.1 %cutout=0.1
New PVsystem.pv35A  bus1=35.1  Phases=1 kV=4.16 kVA=12 pmpp=10 irradiance=1 pf=1 %cutin=0.1 %cutout=0.1
New PVsystem.pv42A  bus1=42.1  Phases=1 kV=4.16 kVA=12 pmpp=10 irradiance=1 pf=1 %cutin=0.1 %cutout=0.1
New PVsystem.pv47A  bus1=47.1  Phases=1 kV=4.16 kVA=12 pmpp=10 irradiance=1 pf=1 %cutin=0.1 %cutout=0.1
New PVsystem.pv48A  bus1=48.1  Phases=1 kV=4.16 kVA=12 pmpp=10 irradiance=1 pf=1 %cutin=0.1 %cutout=0.1
New PVsystem.pv49A  bus1=49.1  Phases=1 kV=4.16 kVA=12 pmpp=10 irradiance=1 pf=1 %cutin=0.1 %cutout=0.1
New PVsystem.pv151A bus1=151.1 Phases=1 kV=4.16 kVA=12 pmpp=10 irradiance=1 pf=1 %cutin=0.1 %cutout=0.1
New PVsystem.pv76A  bus1=76.1  Phases=1 kV=4.16 kVA=12 pmpp=10 irradiance=1 pf=1 %cutin=0.1 %cutout=0.1
New PVsystem.pv86A  bus1=86.1  Phases=1 kV=4.16 kVA=12 pmpp=10 irradiance=1 pf=1 %cutin=0.1 %cutout=0.1
New PVsystem.pv91A  bus1=91.1  Phases=1 kV=4.16 kVA=12 pmpp=10 irradiance=1 pf=1 %cutin=0.1 %cutout=0.1
New PVsystem.pv93A  bus1=93.1  Phases=1 kV=4.16 kVA=12 pmpp=10 irradiance=1 pf=1 %cutin=0.1 %cutout=0.1
New PVsystem.pv97A  bus1=97.1  Phases=1 kV=4.16 kVA=12 pmpp=10 irradiance=1 pf=1 %cutin=0.1 %cutout=0.1
New PVsystem.pv99A  bus1=99.1  Phases=1 kV=4.16 kVA=12 pmpp=10 irradiance=1 pf=1 %cutin=0.1 %cutout=0.1
New PVsystem.pv100A bus1=100.1 Phases=1 kV=4.16 kVA=12 pmpp=10 irradiance=1 pf=1 %cutin=0.1 %cutout=0.1
New PVsystem.pv101A bus1=101.1 Phases=1 kV=4.16 kVA=12 pmpp=10 irradiance=1 pf=1 %cutin=0.1 %cutout=0.1
New PVsystem.pv105A bus1=105.1 Phases=1 kV=4.16 kVA=12 pmpp=10 irradiance=1 pf=1 %cutin=0.1 %cutout=0.1
New PVsystem.pv108A bus1=108.1 Phases=1 kV=4.16 kVA=12 pmpp=10 irradiance=1 pf=1 %cutin=0.1 %cutout=0.1
! Phase B
New PVsystem.pv1B   bus1=1.2   Phases=1 kV=4.16 kVA=12 pmpp=10 irradiance=1 pf=1 %cutin=0.1 %cutout=0.1
New PVsystem.pv7B   bus1=7.2   Phases=1 kV=4.16 kVA=12 pmpp=10 irradiance=1 pf=1 %cutin=0.1 %cutout=0.1
New PVsystem.pv13B  bus1=13.2  Phases=1 kV=4.16 kVA=12 pmpp=10 irradiance=1 pf=1 %cutin=0.1 %cutout=0.1
New PVsystem.pv18B  bus1=18.2  Phases=1 kV=4.16 kVA=12 pmpp=10 irradiance=1 pf=1 %cutin=0.1 %cutout=0.1
New PVsystem.pv21B  bus1=21.2  Phases=1 kV=4.16 kVA=12 pmpp=10 irradiance=1 pf=1 %cutin=0.1 %cutout=0.1
New PVsystem.pv23B  bus1=23.2  Phases=1 kV=4.16 kVA=12 pmpp=10 irradiance=1 pf=1 %cutin=0.1 %cutout=0.1
New PVsystem.pv28B  bus1=28.2  Phases=1 kV=4.16 kVA=12 pmpp=10 irradiance=1 pf=1 %cutin=0.1 %cutout=0.1
New PVsystem.pv250B bus1=250.2 Phases=1 kV=4.16 kVA=12 pmpp=10 irradiance=1 pf=1 %cutin=0.1 %cutout=0.1
New PVsystem.pv54B  bus1=54.2  Phases=1 kV=4.16 kVA=12 pmpp=10 irradiance=1 pf=1 %cutin=0.1 %cutout=0.1
New PVsystem.pv57B  bus1=57.2  Phases=1 kV=4.16 kVA=12 pmpp=10 irradiance=1 pf=1 %cutin=0.1 %cutout=0.1
New PVsystem.pv60B  bus1=60.2  Phases=1 kV=4.16 kVA=12 pmpp=10 irradiance=1 pf=1 %cutin=0.1 %cutout=0.1
New PVsystem.pv610B bus1=610.2 Phases=1 kV=4.16 kVA=12 pmpp=10 irradiance=1 pf=1 %cutin=0.1 %cutout=0.1
New PVsystem.pv63B  bus1=63.2  Phases=1 kV=4.16 kVA=12 pmpp=10 irradiance=1 pf=1 %cutin=0.1 %cutout=0.1
New PVsystem.pv65B  bus1=65.2  Phases=1 kV=4.16 kVA=12 pmpp=10 irradiance=1 pf=1 %cutin=0.1 %cutout=0.1
New PVsystem.pv35B  bus1=35.2  Phases=1 kV=4.16 kVA=12 pmpp=10 irradiance=1 pf=1 %cutin=0.1 %cutout=0.1
New PVsystem.pv42B  bus1=42.2  Phases=1 kV=4.16 kVA=12 pmpp=10 irradiance=1 pf=1 %cutin=0.1 %cutout=0.1
New PVsystem.pv47B  bus1=47.2  Phases=1 kV=4.16 kVA=12 pmpp=10 irradiance=1 pf=1 %cutin=0.1 %cutout=0.1
New PVsystem.pv48B  bus1=48.2  Phases=1 kV=4.16 kVA=12 pmpp=10 irradiance=1 pf=1 %cutin=0.1 %cutout=0.1
New PVsystem.pv49B  bus1=49.2  Phases=1 kV=4.16 kVA=12 pmpp=10 irradiance=1 pf=1 %cutin=0.1 %cutout=0.1
New PVsystem.pv151B bus1=151.2 Phases=1 kV=4.16 kVA=12 pmpp=10 irradiance=1 pf=1 %cutin=0.1 %cutout=0.1
New PVsystem.pv76B  bus1=76.2  Phases=1 kV=4.16 kVA=12 pmpp=10 irradiance=1 pf=1 %cutin=0.1 %cutout=0.1
New PVsystem.pv86B  bus1=86.2  Phases=1 kV=4.16 kVA=12 pmpp=10 irradiance=1 pf=1 %cutin=0.1 %cutout=0.1
New PVsystem.pv91B  bus1=91.2  Phases=1 kV=4.16 kVA=12 pmpp=10 irradiance=1 pf=1 %cutin=0.1 %cutout=0.1
New PVsystem.pv93B  bus1=93.2  Phases=1 kV=4.16 kVA=12 pmpp=10 irradiance=1 pf=1 %cutin=0.1 %cutout=0.1
New PVsystem.pv97B  bus1=97.2  Phases=1 kV=4.16 kVA=12 pmpp=10 irradiance=1 pf=1 %cutin=0.1 %cutout=0.1
New PVsystem.pv99B  bus1=99.2  Phases=1 kV=4.16 kVA=12 pmpp=10 irradiance=1 pf=1 %cutin=0.1 %cutout=0.1
New PVsystem.pv100B bus1=100.2 Phases=1 kV=4.16 kVA=12 pmpp=10 irradiance=1 pf=1 %cutin=0.1 %cutout=0.1
New PVsystem.pv101B bus1=101.2 Phases=1 kV=4.16 kVA=12 pmpp=10 irradiance=1 pf=1 %cutin=0.1 %cutout=0.1
New PVsystem.pv105B bus1=105.2 Phases=1 kV=4.16 kVA=12 pmpp=10 irradiance=1 pf=1 %cutin=0.1 %cutout=0.1
New PVsystem.pv108B bus1=108.2 Phases=1 kV=4.16 kVA=12 pmpp=10 irradiance=1 pf=1 %cutin=0.1 %cutout=0.1
! Phase C
New PVsystem.pv1C   bus1=1.3   Phases=1 kV=4.16 kVA=12 pmpp=10 irradiance=1 pf=1 %cutin=0.1 %cutout=0.1
New PVsystem.pv7C   bus1=7.3   Phases=1 kV=4.16 kVA=12 pmpp=10 irradiance=1 pf=1 %cutin=0.1 %cutout=0.1
New PVsystem.pv13C  bus1=13.3  Phases=1 kV=4.16 kVA=12 pmpp=10 irradiance=1 pf=1 %cutin=0.1 %cutout=0.1
New PVsystem.pv18C  bus1=18.3  Phases=1 kV=4.16 kVA=12 pmpp=10 irradiance=1 pf=1 %cutin=0.1 %cutout=0.1
New PVsystem.pv21C  bus1=21.3  Phases=1 kV=4.16 kVA=12 pmpp=10 irradiance=1 pf=1 %cutin=0.1 %cutout=0.1
New PVsystem.pv23C  bus1=23.3  Phases=1 kV=4.16 kVA=12 pmpp=10 irradiance=1 pf=1 %cutin=0.1 %cutout=0.1
New PVsystem.pv28C  bus1=28.3  Phases=1 kV=4.16 kVA=12 pmpp=10 irradiance=1 pf=1 %cutin=0.1 %cutout=0.1
New PVsystem.pv250C bus1=250.3 Phases=1 kV=4.16 kVA=12 pmpp=10 irradiance=1 pf=1 %cutin=0.1 %cutout=0.1
New PVsystem.pv54C  bus1=54.3  Phases=1 kV=4.16 kVA=12 pmpp=10 irradiance=1 pf=1 %cutin=0.1 %cutout=0.1
New PVsystem.pv57C  bus1=57.3  Phases=1 kV=4.16 kVA=12 pmpp=10 irradiance=1 pf=1 %cutin=0.1 %cutout=0.1
New PVsystem.pv60C  bus1=60.3  Phases=1 kV=4.16 kVA=12 pmpp=10 irradiance=1 pf=1 %cutin=0.1 %cutout=0.1
New PVsystem.pv610C bus1=610.3 Phases=1 kV=4.16 kVA=12 pmpp=10 irradiance=1 pf=1 %cutin=0.1 %cutout=0.1
New PVsystem.pv63C  bus1=63.3  Phases=1 kV=4.16 kVA=12 pmpp=10 irradiance=1 pf=1 %cutin=0.1 %cutout=0.1
New PVsystem.pv65C  bus1=65.3  Phases=1 kV=4.16 kVA=12 pmpp=10 irradiance=1 pf=1 %cutin=0.1 %cutout=0.1
New PVsystem.pv35C  bus1=35.3  Phases=1 kV=4.16 kVA=12 pmpp=10 irradiance=1 pf=1 %cutin=0.1 %cutout=0.1
New PVsystem.pv42C  bus1=42.3  Phases=1 kV=4.16 kVA=12 pmpp=10 irradiance=1 pf=1 %cutin=0.1 %cutout=0.1
New PVsystem.pv47C  bus1=47.3  Phases=1 kV=4.16 kVA=12 pmpp=10 irradiance=1 pf=1 %cutin=0.1 %cutout=0.1
New PVsystem.pv48C  bus1=48.3  Phases=1 kV=4.16 kVA=12 pmpp=10 irradiance=1 pf=1 %cutin=0.1 %cutout=0.1
New PVsystem.pv49C  bus1=49.3  Phases=1 kV=4.16 kVA=12 pmpp=10 irradiance=1 pf=1 %cutin=0.1 %cutout=0.1
New PVsystem.pv151C bus1=151.3 Phases=1 kV=4.16 kVA=12 pmpp=10 irradiance=1 pf=1 %cutin=0.1 %cutout=0.1
New PVsystem.pv76C  bus1=76.3  Phases=1 kV=4.16 kVA=12 pmpp=10 irradiance=1 pf=1 %cutin=0.1 %cutout=0.1
New PVsystem.pv86C  bus1=86.3  Phases=1 kV=4.16 kVA=12 pmpp=10 irradiance=1 pf=1 %cutin=0.1 %cutout=0.1
New PVsystem.pv91C  bus1=91.3  Phases=1 kV=4.16 kVA=12 pmpp=10 irradiance=1 pf=1 %cutin=0.1 %cutout=0.1
New PVsystem.pv93C  bus1=93.3  Phases=1 kV=4.16 kVA=12 pmpp=10 irradiance=1 pf=1 %cutin=0.1 %cutout=0.1
New PVsystem.pv97C  bus1=97.3  Phases=1 kV=4.16 kVA=12 pmpp=10 irradiance=1 pf=1 %cutin=0.1 %cutout=0.1
New PVsystem.pv99C  bus1=99.3  Phases=1 kV=4.16 kVA=12 pmpp=10 irradiance=1 pf=1 %cutin=0.1 %cutout=0.1
New PVsystem.pv100C bus1=100.3 Phases=1 kV=4.16 kVA=12 pmpp=10 irradiance=1 pf=1 %cutin=0.1 %cutout=0.1
New PVsystem.pv101C bus1=101.3 Phases=1 kV=4.16 kVA=12 pmpp=10 irradiance=1 pf=1 %cutin=0.1 %cutout=0.1
New PVsystem.pv105C bus1=105.3 Phases=1 kV=4.16 kVA=12 pmpp=10 irradiance=1 pf=1 %cutin=0.1 %cutout=0.1
New PVsystem.pv108C bus1=108.3 Phases=1 kV=4.16 kVA=12 pmpp=10 irradiance=1 pf=1 %cutin=0.1 %cutout=0.1
